C_ms := 0.821 mm/N
S_d := 119 cm^2
V_as := 16.5 L = 0.0165 m^3
M_md := 13.955 gm
M_ms := 14.7 gm
Q_ms := 3.246
Q_es := 0.452
Q_ts := 0.397
R_e := 7.2
BL := 8.2 T*m
B := 1 T
l_e := BL/B = 8.2 m
Dia_coil := 36 mm
Omk_coil := Dia_coil*π = 0.113097 m
N := l_e/Omk_coil = 72.5039
L_e := N^2/l_e = 641.075 1/m
